<?xml version="1.0"?>
<?xml-stylesheet type="text/xsl" href="http://jsbsim.sourceforge.net/JSBSim.xsl"?>
<fdm_config name="757-200" version="2.0" release="ALPHA"
   xmlns:xsi="http://www.w3.org/2001/XMLSchema-instance"
   xsi:noNamespaceSchemaLocation="http://jsbsim.sourceforge.net/JSBSim.xsd">

    <fileheader>
        <author> Isaias V. Prestes, Jon B. </author>
        <email> isaias.prestes@gmail.com, jonbourg@yahoo.com </email>
        <filecreationdate> 2010-06-20 </filecreationdate>
        <description>Boeing 757-200, powered by Rolls Royce (RB211-535E4B)</description>
        <version> 2.1 </version>
    </fileheader>

    <metrics>
        <reference
          refID="757 airplane characteristics, D6-58327"
          author="The Boeing Company"
          title="http://www.boeing.com/"
          date="August 2002"/>
        <documentation>
          Dimensions : lateral position of engines.
                       gear tracks.
          Gear stearing.
          Tanks typical quantities.
        </documentation>

        <reference
          refID="Airliners.net - Aircraft Data and History section - Boeing 757-200"
          author="Airliners.net"
          title="http://www.airliners.net/aircraft-data/stats.main?id=101"
          date="June 2010"/>

        <documentation>
        - Airliners.net - Aircraft Data and History section - Boeing 757-200
        http://www.airliners.net/aircraft-data/stats.main?id=101

        The Boeing 757-200

        Powerplants
		Two 166.4kN (37,400lb) RollsRoyce RB211-535C turbofans, or 178.8kN (40,200lb) RB211-535E4s, or 193.5kN (43,500lb) RB211-535E4-Bs, or 162.8kN (36,600lb) Pratt and Whitney PW2037s, or two 178.4kN (40,100lb) PW2040s, or 189.5kN (42,600lb) PW2043s.

		Performance
		Max cruising speed 914km/h (493kt), economical cruising speed 850km/h (460kt). Range with PW engines and 186 passengers 5053km (2728nm), with RR engines 4758km (2569nm). Range at optional max takeoff weight with PW engines 7277km (3929nm), with RR engines 6888km (3719nm). 757-200PF - Speeds same. Range with 22,680kg payload and PW engines 7195km (3885nm), with RR engines 6857km (3700nm).

		Weights
		Operating empty with PW engines 57,840kg (127,520lb), with RB211s 57,975kg (127,810lb). Basic max takeoff 99,790kg (220,000lb), medium range MTOW 108,860kg (240,000lb), extended range MTOW 115,665kg (255,000lb) or 115,895kg (255,550lb).

		Dimensions
		Wing span 38.05m (124ft 10in), length 47.32m (155ft 3in), height 13.56m (44ft 6in). Wing area 185.3m2 (1994sq ft).

		Capacity
		Flightcrew of two. 757-200 - Typical passenger arrangements vary from 178 two class (16 first and 162 economy), or 202 (12 first and 190 economy) or 208 (12 first and 196 economy) or 214 to 239 in all economy class. 757-200PF - Maximum of 15 standard 2.24 x 2.74m (88 x 108in) freight pallets on main deck.

		Production
		926 757-200s had been ordered by late 1998, of which over 829 had been delivered.

		Type
		Medium range narrowbody airliner

		History

		After a slow sales start, the medium range single aisle 757 has become yet another sales success story for Boeing.

		Boeing considered a number of proposals for a successor to the 727 trijet during the 1970s, with many of these designs featuring the nose and Ttail of the earlier jet. It was not until later in that decade however that Boeing settled on a more conventional design featuring the same cross section as the 727 (not to mention the 737, 707 and 720) but with the fuselage considerably longer in length, an all new wing, nose and flightdeck and fuel efficient high bypass turbofan engines.

		Boeing launched development of the 757 in March 1979 following orders from British Airways and Eastern. Developed in tandem with the larger widebody 767 the two types share a number of systems and technologies, including a common early generation EFIS flightdeck.

		First flight was on February 19 1982 and the 757 entered service in January the following year. Subsequent versions to appear are the 757-200PF Package Freighter, a pure freighter, and the 757-200M Combi (only one has been built). The standard passenger aircraft is designated the 757-200, there being no 100. The stretched 757-300 is described separately.

		Initial sales of the 757 were fairly slow, however orders picked up significantly in the mid to late 1980s as traffic on routes previously served by smaller 727s and 737s grew to require the 757's extra capacity. Today 757 sales comfortably exceed those of the 767, a position that was reversed until the late 1980s.

		Copyright Airliners.net, some information Copyright Aerospace Publications
        </documentation>

        <wingarea unit="M2"> 185.3 </wingarea>
        <wingspan unit="M"> 38.05 </wingspan>
        <chord unit="M"> 5.07238 </chord>
        <wing_incidence unit=""> 2 </wing_incidence>
        <htailarea unit="M2"> 538.35 </htailarea>
        <htailarm unit="M"> 62.65 </htailarm>
        <vtailarea unit="M2"> 678.21 </vtailarea>
        <vtailarm unit="M"> 54.83 </vtailarm>
        <location name="AERORP" unit="M">
            <x>-0.699198   </x>
            <y> 0.00000  </y>
            <z> 3.260678 </z>
        </location>
        <location name="EYEPOINT" unit="M">
            <x> -22.39430 </x>
            <y>  -0.52257 </y>
            <z>   4.71967 </z>
        </location>
        <location name="VRP" unit="M">
            <x> 0.00000 </x>
            <y> 0.00000 </y>
            <z> 0.00000 </z>
        </location>
    </metrics>

    <mass_balance>
        <ixx unit="SLUG*FT2">958184.1595</ixx>
        <iyy unit="SLUG*FT2">3573804.3670</iyy>
        <izz unit="SLUG*FT2">4143570.3923</izz>
        <ixz unit="KG*M2">0</ixz>
        <iyz unit="KG*M2">0</iyz>
        <ixy unit="KG*M2">0</ixy>
        <emptywt unit="LBS">126060</emptywt><!-- http://www.aerospaceweb.org/aircraft/jetliner/b757/ -->
        <!-- 	24.0303	-0.109752	0
				-0.699198	0.00000	3.260678 -->
        <location name="CG" unit="M">
            <x>-1.559198   </x>
            <y> 0.00000  </y>
            <z>3.260678 </z>
        </location>

		<!-- Pointmass properties to add weight of Pilot/Co-Pilot/186 Passengers/5 Flight Attendents/Payload -->
		<pointmass name="Pilot">
        <weight unit="LBS"> 180 </weight>
        <location name="POINTMASS" unit="M">
            <x> -22.39430 </x>
            <y>  -0.52257 </y>
            <z>   4.71967 </z>
        </location>
		</pointmass>

		<pointmass name="Co-Pilot">
        <weight unit="LBS"> 180 </weight>
        <location name="POINTMASS" unit="M">
            <x> -22.39430 </x>
            <y>   0.52257 </y>
            <z>   4.71967 </z>
        </location>
		</pointmass>

        <reference
          refID="Delta 757 airplane configuration B"
          author="SeatGuru"
          title="http://www.seatguru.com/airlines/Delta_Airlines/Delta_Airlines_Boeing_757-200_B.php"
          date="June 2010"/>
        <documentation>
          - http://www.seatguru.com/airlines/Delta_Airlines/Delta_Airlines_Boeing_757-200_B.php

		Delta Air Lines Boeing 757-200 Vers. 2 (757)
		Delta flies eight configurations of this aircraft. Be sure to check each seatmap carefully before selecting your seat.
						pitch		width	seating details
		First Class: 	37-38.0"	20.75"	24 seats with no footrests
		Economy Class: 	31.0"		17.0"	162 seats

        </documentation>

		<pointmass name="PAX First Class">
        <weight unit="LBS"> 0.0000 </weight>
        <location name="POINTMASS" unit="M">
        	<x>-14.823948   </x>
            <y> 0.00000  </y>
            <z>3.905603 </z>
        </location>
		</pointmass>

		<pointmass name="PAX Economy Class 1">
        <weight unit="LBS"> 0.0000 </weight>
        <location name="POINTMASS" unit="M">
            <x>-1.485598   </x>
            <y> 0.00000  </y>
            <z>3.905603 </z>
        </location>
		</pointmass>

		<pointmass name="PAX Economy Class 2">
        <weight unit="LBS"> 0.0000 </weight>
        <location name="POINTMASS" unit="M">
            <x>8.139602   </x>
            <y> 0.00000  </y>
            <z>3.905603 </z>
        </location>
		</pointmass>


        <reference
          refID="757 airplane characteristics, D6-58327"
          author="The Boeing Company"
          title="http://www.boeing.com/"
          date="August 2002"/>
        <documentation>
          - http://www.ups.com/aircargo/using/services/services/domestic/svc-aircraft.html
          - https://aviationcargo.dhl.com/webedit/files/b757sf.pdf
          Compartment Load Capacity
			Main: 15 - 88" x 125" positions 	(224cm. x 318cm.)
			Belly A: 	700 cu. ft. (19.8 cu. m.)
			Belly B: 	1,090 cu. ft. (30.9 cu. m)

			Cargo Door Dimensions
			Main Cargo Door 	86" x 134" (218cm. X 340cm.)
			Lower Forward Door 	44" x 55" (112cm. X 140cm.)
			Lower Aft Door 	44" x 55" (112cm. X 140cm.)

        </documentation>

		<pointmass name="Cargo Belly A"> 				<!-- Compartment Load Capacity Belly A -->
        <weight unit="LBS"> 0.0000 </weight>
        <location name="POINTMASS" unit="M">
            <x> -13.757398 </x>
            <y> 0.00000 </y>
            <z> 3.141967 </z>
        </location>
		</pointmass>

		<pointmass name="Cargo Belly B"> 				<!-- Compartment Load Capacity Belly B -->
        <weight unit="LBS"> 0.0000 </weight>
        <location name="POINTMASS" unit="M">
            <x> 9.279002 </x>
            <y> 0.00000 </y>
            <z> 3.141967 </z>
        </location>
		</pointmass>

    </mass_balance>

    <ground_reactions>
        <contact type="BOGEY" name="NOSE">
            <location unit="M">
                <x> -19.423558000 </x>
                <y> 0.000000000 </y>
                <z> 0.000210075 </z>
            </location>
            <static_friction> 0.8 </static_friction>
            <dynamic_friction> 0.5 </dynamic_friction>
            <rolling_friction> 0.02 </rolling_friction>
            <spring_coeff unit="LBS/FT"> 76522.3 </spring_coeff>
            <damping_coeff unit="LBS/FT/SEC"> 25507.4 </damping_coeff>
            <max_steer unit="DEG"> 65 </max_steer>
            <brake_group> NONE </brake_group>
            <retractable> 1 </retractable>
        </contact>
        <contact type="BOGEY" name="LEFT_MAIN">
            <location unit="M">
                <x> 0.081002000 </x>
                <y>  3.767640000 </y>
                <z> -0.001389925 </z>
            </location>
            <static_friction> 0.8 </static_friction>
            <dynamic_friction> 0.5 </dynamic_friction>
            <rolling_friction> 0.02 </rolling_friction>
            <spring_coeff unit="LBS/FT"> 255074 </spring_coeff>
            <damping_coeff unit="LBS/FT/SEC"> 51014.9 </damping_coeff>
            <max_steer unit="DEG"> 0 </max_steer>
            <brake_group> LEFT </brake_group>
            <retractable> 1 </retractable>
        </contact>
        <contact type="BOGEY" name="RIGHT_MAIN">
            <location unit="M">
                <x> 0.081002000 </x>
                <y> -3.767640000 </y>
                <z> -0.001389925 </z>
            </location>
            <static_friction> 0.8 </static_friction>
            <dynamic_friction> 0.5 </dynamic_friction>
            <rolling_friction> 0.02 </rolling_friction>
            <spring_coeff unit="LBS/FT"> 255074 </spring_coeff>
            <damping_coeff unit="LBS/FT/SEC"> 51014.9 </damping_coeff>
            <max_steer unit="DEG"> 0 </max_steer>
            <brake_group> RIGHT </brake_group>
            <retractable> 1 </retractable>
        </contact>
        <contact type="STRUCTURE" name="Left_Wing">
            <location unit="M">
                <x> -1.792198 </x>
                <y> -1.907070 </y>
                <z>  3.587475 </z>
            </location>
            <static_friction> 0.8 </static_friction>
            <dynamic_friction> 0.5 </dynamic_friction>
            <rolling_friction> 0 </rolling_friction>
            <spring_coeff unit="LBS/FT"> 255074 </spring_coeff>
            <damping_coeff unit="LBS/FT/SEC"> 51014.9 </damping_coeff>
            <max_steer unit="DEG"> 0 </max_steer>
            <brake_group> NONE </brake_group>
            <retractable> 1 </retractable>
        </contact>

        <contact type="STRUCTURE" name="Right_Wing">
            <location unit="M">
                <x> -1.792198 </x>
                <y>  1.907070 </y>
                <z>  3.587475 </z>
            </location>
            <static_friction> 0.8 </static_friction>
            <dynamic_friction> 0.5 </dynamic_friction>
            <rolling_friction> 0 </rolling_friction>
            <spring_coeff unit="LBS/FT"> 255074 </spring_coeff>
            <damping_coeff unit="LBS/FT/SEC"> 51014.9 </damping_coeff>
            <max_steer unit="DEG"> 0 </max_steer>
            <brake_group> NONE </brake_group>
            <retractable> 1 </retractable>
        </contact>
		<contact type="BOGEY" name="Engine_Left">
            <location unit="M">
                <x> -7.560198 </x>
                <y> -6.406370 </y>
                <z>  1.326420 </z>
            </location>
            <static_friction> 0.2 </static_friction>
            <dynamic_friction> 0.2 </dynamic_friction>
            <rolling_friction> 0.02 </rolling_friction>
            <spring_coeff unit="LBS/FT"> 1.5e+06 </spring_coeff>
            <damping_coeff unit="LBS/FT/SEC"> 60000 </damping_coeff>
            <max_steer unit="DEG"> 0.0 </max_steer>
            <brake_group> NONE </brake_group>
            <retractable>0</retractable>
        </contact>

        <contact type="BOGEY" name="Engine_Right">
            <location unit="M">
                <x> -7.560198 </x>
                <y>  6.406370 </y>
                <z>  1.326420 </z>
            </location>
            <static_friction> 0.2 </static_friction>
            <dynamic_friction> 0.2 </dynamic_friction>
            <rolling_friction> 0.02 </rolling_friction>
            <spring_coeff unit="LBS/FT"> 1.5e+06 </spring_coeff>
            <damping_coeff unit="LBS/FT/SEC"> 60000 </damping_coeff>
            <max_steer unit="DEG"> 0.0 </max_steer>
            <brake_group> NONE </brake_group>
            <retractable>0</retractable>
        </contact>

        <contact type="BOGEY" name="Left_Wing_Tip">
            <location unit="M">
                <x> 3.965402 </x>
                <y> -19.037600 </y>
                <z> 5.098220 </z>
            </location>
            <static_friction> 0.2 </static_friction>
            <dynamic_friction> 0.2 </dynamic_friction>
            <rolling_friction> 0.02 </rolling_friction>
            <spring_coeff unit="LBS/FT"> 1.5e+06 </spring_coeff>
            <damping_coeff unit="LBS/FT/SEC"> 60000 </damping_coeff>
            <max_steer unit="DEG"> 0.0 </max_steer>
            <brake_group> NONE </brake_group>
            <retractable>0</retractable>
        </contact>

        <contact type="BOGEY" name="Right_Wing_Tip">
            <location unit="M">
                <x>  3.965402 </x>
                <y> 19.037600 </y>
                <z>  5.098220 </z>
            </location>
            <static_friction> 0.2 </static_friction>
            <dynamic_friction> 0.2 </dynamic_friction>
            <rolling_friction> 0.02 </rolling_friction>
            <spring_coeff unit="LBS/FT"> 1.5e+06 </spring_coeff>
            <damping_coeff unit="LBS/FT/SEC"> 60000 </damping_coeff>
            <max_steer unit="DEG"> 0.0 </max_steer>
            <brake_group> NONE </brake_group>
            <retractable>0</retractable>
        </contact>

        <contact type="BOGEY" name="NOSE_TIP">
            <location unit="M">
                <x> -24.72950 </x>
                <y>   0.00000 </y>
                <z>   3.37043 </z>
            </location>
            <static_friction> 0.2 </static_friction>
            <dynamic_friction> 0.2 </dynamic_friction>
            <rolling_friction> 0.02 </rolling_friction>
            <spring_coeff unit="LBS/FT"> 1.5e+06 </spring_coeff>
            <damping_coeff unit="LBS/FT/SEC"> 60000 </damping_coeff>
            <max_steer unit="DEG"> 0.0 </max_steer>
            <brake_group> NONE </brake_group>
            <retractable>0</retractable>
        </contact>

        <contact type="BOGEY" name="NOSE_TOP">
            <location unit="M">
                <x> -23.63050 </x>
                <y>   0.00000 </y>
                <z>   4.41083 </z>
            </location>
            <static_friction> 0.2 </static_friction>
            <dynamic_friction> 0.2 </dynamic_friction>
            <rolling_friction> 0.02 </rolling_friction>
            <spring_coeff unit="LBS/FT"> 1.5e+06 </spring_coeff>
            <damping_coeff unit="LBS/FT/SEC"> 60000 </damping_coeff>
            <max_steer unit="DEG"> 0.0 </max_steer>
            <brake_group> NONE </brake_group>
            <retractable>0</retractable>
        </contact>
        <contact type="BOGEY" name="TAIL_TOP">
            <location unit="M">
                <x> 21.14140 </x>
                <y>  0.00000 </y>
                <z> 13.55483 </z>
            </location>
            <static_friction> 0.2 </static_friction>
            <dynamic_friction> 0.2 </dynamic_friction>
            <rolling_friction> 0.02 </rolling_friction>
            <spring_coeff unit="LBS/FT"> 1.5e+06 </spring_coeff>
            <damping_coeff unit="LBS/FT/SEC"> 60000 </damping_coeff>
            <max_steer unit="DEG"> 0.0 </max_steer>
            <brake_group> NONE </brake_group>
            <retractable>0</retractable>
        </contact>
        <contact type="BOGEY" name="Tail_Tip_Front">
            <location unit="M">
                <x> 19.86190 </x>
                <y>  0.00000 </y>
                <z> 13.55483 </z>
            </location>
            <static_friction> 0.2 </static_friction>
            <dynamic_friction> 0.2 </dynamic_friction>
            <rolling_friction> 0.02 </rolling_friction>
            <spring_coeff unit="LBS/FT"> 1.5e+06 </spring_coeff>
            <damping_coeff unit="LBS/FT/SEC"> 60000 </damping_coeff>
            <max_steer unit="DEG"> 0.0 </max_steer>
            <brake_group> NONE </brake_group>
            <retractable>0</retractable>
        </contact>

        <contact type="BOGEY" name="Tail_Tip_Back">
            <location unit="M">
                <x> 22.58760 </x>
                <y> 0.00000 </y>
                <z> 13.55363 </z>
            </location>
            <static_friction> 0.2 </static_friction>
            <dynamic_friction> 0.2 </dynamic_friction>
            <rolling_friction> 0.02 </rolling_friction>
            <spring_coeff unit="LBS/FT"> 1.5e+06 </spring_coeff>
            <damping_coeff unit="LBS/FT/SEC"> 60000 </damping_coeff>
            <max_steer unit="DEG"> 0.0 </max_steer>
            <brake_group> NONE </brake_group>
            <retractable>0</retractable>
        </contact>

        <contact type="BOGEY" name="Tail_Down">
            <location unit="M">
                <x> 11.65840 </x>
                <y> 0.00000 </y>
                <z> 2.32481 </z>
            </location>
            <static_friction> 0.2 </static_friction>
            <dynamic_friction> 0.2 </dynamic_friction>
            <rolling_friction> 0.02 </rolling_friction>
            <spring_coeff unit="LBS/FT"> 1.5e+06 </spring_coeff>
            <damping_coeff unit="LBS/FT/SEC"> 60000 </damping_coeff>
            <max_steer unit="DEG"> 0.0 </max_steer>
            <brake_group> NONE </brake_group>
            <retractable>0</retractable>
        </contact>

        <contact type="BOGEY" name="Fuselage_End">
            <location unit="M">
                <x> 22.19380 </x>
                <y>  0.00000 </y>
                <z>  5.05935 </z>
            </location>
            <static_friction> 0.2 </static_friction>
            <dynamic_friction> 0.2 </dynamic_friction>
            <rolling_friction> 0.02 </rolling_friction>
            <spring_coeff unit="LBS/FT"> 1.5e+06 </spring_coeff>
            <damping_coeff unit="LBS/FT/SEC"> 60000 </damping_coeff>
            <max_steer unit="DEG"> 0.0 </max_steer>
            <brake_group> NONE </brake_group>
            <retractable>0</retractable>
        </contact>


    </ground_reactions>

    <propulsion>
        <engine file="RB211-535E4B">
            <location unit="M">
                <x> -6.053898 </x>
                <y> -6.406370 </y>
                <z>  2.569903 </z>
            </location>
            <orient unit="DEG">
                <roll> 0 </roll>
                <pitch> 0 </pitch>
                <yaw> 0 </yaw>
            </orient>
            <feed>0</feed>
            <feed>1</feed>
            <thruster file="direct">
                <location unit="M">
	                <x> -6.053898 </x>
	                <y> -6.406370 </y>
	                <z>  2.569903 </z>
                </location>
                <orient unit="DEG">
                    <roll> 0 </roll>
                    <pitch> 0 </pitch>
                    <yaw> 0 </yaw>
                </orient>
            </thruster>
        </engine>
        <engine file="RB211-535E4B">
            <location unit="M">
                <x> -6.053898 </x>
                <y>  6.406370 </y>
                <z>  2.569903 </z>
            </location>
            <orient unit="DEG">
                <roll> 0 </roll>
                <pitch> 0 </pitch>
                <yaw> 0 </yaw>
            </orient>
            <feed>0</feed>
            <feed>2</feed>
            <thruster file="direct">
                <location unit="M">
	                <x> -6.053898 </x>
	                <y>  6.406370 </y>
	                <z>  2.569903 </z>
                </location>
                <orient unit="DEG">
                    <roll> 0 </roll>
                    <pitch> 0 </pitch>
                    <yaw> 0 </yaw>
                </orient>
            </thruster>
        </engine>
        <!-- http://www.davesweb.cnchost.com/nwsltr68f.html -->
        <reference
          refID="757 airplane characteristics, D6-58327"
          author="The Boeing Company"
          title="http://www.davesweb.cnchost.com/nwsltr68f.html"
          date="August 2002"/>
        <documentation>
          - http://www.davesweb.cnchost.com/nwsltr68f.html
          - http://www.davesweb.cnchost.com/757fuel.gif

			Left wing - 2170 usgal
			Right Wing - 6900 usgal
			Center Tank - 2170 usgal
			Total - 11240 usgal
        </documentation>

        <tank type="FUEL">
        	<name>Center Tank</name>
            <location unit="M">
                <x> 0.108902 </x>
                <y> 0.000000 </y>
                <z> 3.259559 </z>
            </location>
            <capacity unit="LBS">47196</capacity>
            <contents unit="LBS">25000</contents>
        </tank>
        <tank type="FUEL">
        	<name>Left Wing Tank</name>
            <location unit="M">
                <x>  0.108902 </x>
                <y> -5.719360 </y>
                <z>  4.001577 </z>
            </location>
            <capacity unit="LBS">14842.8</capacity>
            <contents unit="LBS">7000</contents>
        </tank>
        <tank type="FUEL">
        	<name>Right Wing Tank</name>
            <location unit="M">
                <x>  0.108902 </x>
                <y>  5.719360 </y>
                <z>  4.001577 </z>
            </location>
            <capacity unit="LBS">14842.8</capacity>
            <contents unit="LBS">7000</contents>
        </tank>
    </propulsion>

    <flight_control name="FCS: 757">

        <channel name="Pitch">

            <summer name="Pitch Trim Sum">
              <input>fcs/elevator-cmd-norm</input>
              <input>fcs/pitch-trim-cmd-norm</input>
              <clipto>
                <min>-1</min>
                <max>1</max>
              </clipto>
            </summer>

            <aerosurface_scale name="Elevator Control">
              <input>fcs/pitch-trim-sum</input>
              <range>
                <min>-0.35</min>
                <max>0.35</max>
              </range>
              <output>fcs/elevator-pos-rad</output>
            </aerosurface_scale>

            <aerosurface_scale name="elevator normalization">
              <input>fcs/elevator-pos-rad</input>
              <domain>
                <min>-0.35</min>
                <max>0.35</max>
              </domain>
              <range>
                <min>-1</min>
                <max>1</max>
              </range>
              <output>fcs/elevator-pos-norm</output>
            </aerosurface_scale>

        </channel>

        <channel name="Roll">

            <summer name="Roll Trim Sum">
              <input>fcs/aileron-cmd-norm</input>
              <input>fcs/roll-trim-cmd-norm</input>
              <clipto>
                <min>-1</min>
                <max>1</max>
              </clipto>
            </summer>

            <aerosurface_scale name="Left Aileron Control">
              <input>fcs/roll-trim-sum</input>
              <range>
                <min>-0.35</min>
                <max>0.35</max>
              </range>
              <output>fcs/left-aileron-pos-rad</output>
            </aerosurface_scale>

            <aerosurface_scale name="Right Aileron Control">
              <input>fcs/roll-trim-sum</input>
              <range>
                <min>-0.35</min>
                <max>0.35</max>
              </range>
              <output>fcs/right-aileron-pos-rad</output>
            </aerosurface_scale>

            <aerosurface_scale name="left aileron normalization">
              <input>fcs/left-aileron-pos-rad</input>
              <domain>
                <min>-0.35</min>
                <max>0.35</max>
              </domain>
              <range>
                <min>-1</min>
                <max>1</max>
              </range>
              <output>fcs/left-aileron-pos-norm</output>
            </aerosurface_scale>

            <aerosurface_scale name="right aileron normalization">
              <input>fcs/right-aileron-pos-rad</input>
              <domain>
                <min>-0.35</min>
                <max>0.35</max>
              </domain>
              <range>
                <min>-1</min>
                <max>1</max>
              </range>
              <output>fcs/right-aileron-pos-norm</output>
            </aerosurface_scale>

        </channel>

        <channel name="Yaw">

            <summer name="Rudder Command Sum">
              <input>fcs/rudder-cmd-norm</input>
              <input>fcs/yaw-trim-cmd-norm</input>
              <clipto>
                <min>-0.35</min>
                <max>0.35</max>
              </clipto>
            </summer>

            <scheduled_gain name="Yaw Damper Rate">
              <input>velocities/r-aero-rad_sec</input>
              <table>
                <independentVar> velocities/ve-kts </independentVar>
                <tableData>
                  30		0
                  60		2
                </tableData>
              </table>
            </scheduled_gain>

            <scheduled_gain name="Yaw Damper Beta">
              <input>aero/beta-rad</input>
              <table>
                <independentVar> velocities/ve-kts </independentVar>
                <tableData>
                  30		0
                  60		0
                </tableData>
              </table>
            </scheduled_gain>

            <summer name="Yaw Damper Sum">
              <input>fcs/yaw-damper-beta</input>
              <input>fcs/yaw-damper-rate</input>
              <clipto>
                <min>-0.1</min>
                <max>0.1</max>
              </clipto>
            </summer>

            <scheduled_gain name="Yaw Damper Final">
              <input>fcs/yaw-damper-sum</input>
              <table>
                <independentVar> velocities/ve-kts </independentVar>
                <tableData>
                  30		0
                  31		1
                </tableData>
              </table>
            </scheduled_gain>

            <summer name="Rudder Sum">
              <input>fcs/rudder-command-sum</input>
              <input>fcs/yaw-damper-final</input>
              <clipto>
                <min>-1</min>
                <max>1</max>
              </clipto>
            </summer>

            <aerosurface_scale name="Rudder Control">
              <input>fcs/rudder-sum</input>
              <range>
                <min>-0.35</min>
                <max>0.35</max>
              </range>
              <output>fcs/rudder-pos-rad</output>
            </aerosurface_scale>

            <aerosurface_scale name="rudder normalization">
              <input>fcs/rudder-pos-rad</input>
              <domain>
                <min>-0.35</min>
                <max>0.35</max>
              </domain>
              <range>
                <min>-1</min>
                <max>1</max>
              </range>
              <output>fcs/rudder-pos-norm</output>
            </aerosurface_scale>

        </channel>

        <channel name="Flaps">

            <kinematic name="Flaps Control">
              <input>fcs/flap-cmd-norm</input>
              <traverse>
                <setting>
                  <position>0</position>
                  <time>0</time>
                </setting>
                <setting>
                  <position>15</position>
                  <time>4</time>
                </setting>
                <setting>
                  <position>30</position>
                  <time>3</time>
                </setting>
              </traverse>
              <output>fcs/flap-pos-deg</output>
            </kinematic>

            <aerosurface_scale name="flap normalization">
              <input>fcs/flap-pos-deg</input>
              <domain>
                <min>0</min>
                <max>30</max>
              </domain>
              <range>
                <min>0</min>
                <max>1</max>
              </range>
              <output>fcs/flap-pos-norm</output>
            </aerosurface_scale>

        </channel>

        <channel name="Landing Gear">

            <kinematic name="Gear Control">
              <input>gear/gear-cmd-norm</input>
              <traverse>
                <setting>
                  <position>0</position>
                  <time>0</time>
                </setting>
                <setting>
                  <position>1</position>
                  <time>5</time>
                </setting>
              </traverse>
              <output>gear/gear-pos-norm</output>
            </kinematic>

        </channel>

        <channel name="Speedbrake">

            <kinematic name="Speedbrake Control">
              <input>fcs/speedbrake-cmd-norm</input>
              <traverse>
                <setting>
                  <position>0</position>
                  <time>0</time>
                </setting>
                <setting>
                  <position>1</position>
                  <time>1</time>
                </setting>
              </traverse>
              <output>fcs/speedbrake-pos-norm</output>
            </kinematic>

        </channel>

    </flight_control>

    <aerodynamics>
        <axis name="LIFT" unit="LBS">
            <function name="aero/coefficient/CLalpha">
                <description>Lift_due_to_alpha</description>
                <product>
                    <property>aero/qbar-psf</property>
                    <property>metrics/Sw-sqft</property>
                    <table>
                        <independentVar>aero/alpha-rad</independentVar>
                        <tableData>
                          -0.2          -0.68
                          0             0.2
                          0.23          1.2
                          0.6           0.6
                        </tableData>
                    </table>
                </product>
            </function>
            <function name="aero/coefficient/dCLflap">
                <description>Delta_Lift_due_to_flaps</description>
                <product>
                    <property>aero/qbar-psf</property>
                    <property>metrics/Sw-sqft</property>
                    <property>fcs/flap-pos-deg</property>
                    <value>0.05</value>
                </product>
            </function>
            <function name="aero/coefficient/dCLsb">
                <description>Delta_Lift_due_to_speedbrake</description>
                <product>
                    <property>aero/qbar-psf</property>
                    <property>metrics/Sw-sqft</property>
                    <property>fcs/speedbrake-pos-norm</property>
                    <value>-0.1</value>
                </product>
            </function>
            <function name="aero/coefficient/CLde">
                <description>Lift_due_to_Elevator_Deflection</description>
                <product>
                    <property>aero/qbar-psf</property>
                    <property>metrics/Sw-sqft</property>
                    <property>fcs/elevator-pos-rad</property>
                    <value>0.2</value>
                </product>
            </function>
        </axis>
        <axis name="DRAG" unit="LBS">
            <function name="aero/coefficient/CD0">
                <description>Drag_at_zero_lift</description>
                <product>
                    <property>aero/qbar-psf</property>
                    <property>metrics/Sw-sqft</property>
                    <table>
                        <independentVar>aero/alpha-rad</independentVar>
                        <tableData>
                          -1.57         1.5
                          -0.26         0.026
                          0             0.02
                          0.26          0.026
                          1.57          1.5
                        </tableData>
                    </table>
                </product>
            </function>
            <function name="aero/coefficient/CDi">
                <description>Induced_drag</description>
                <product>
                    <property>aero/qbar-psf</property>
                    <property>metrics/Sw-sqft</property>
                    <property>aero/cl-squared</property>
                    <value>0.043</value>
                </product>
            </function>
            <function name="aero/coefficient/CDmach">
                <description>Drag_due_to_mach</description>
                <product>
                    <property>aero/qbar-psf</property>
                    <property>metrics/Sw-sqft</property>
                    <table>
                        <independentVar>velocities/mach</independentVar>
                        <tableData>
                          0             0
                          0.79          0
                          1.1           0.023
                          1.8           0.015
                        </tableData>
                    </table>
                </product>
            </function>
            <function name="aero/coefficient/CDflap">
                <description>Drag_due_to_flaps</description>
                <product>
                    <property>aero/qbar-psf</property>
                    <property>metrics/Sw-sqft</property>
                    <property>fcs/flap-pos-deg</property>
                    <value>0.00197</value>
                </product>
            </function>
            <function name="aero/coefficient/CDgear">
                <description>Drag_due_to_gear</description>
                <product>
                    <property>aero/qbar-psf</property>
                    <property>metrics/Sw-sqft</property>
                    <property>gear/gear-pos-norm</property>
                    <value>0.015</value>
                </product>
            </function>
            <function name="aero/coefficient/CDsb">
                <description>Drag_due_to_speedbrakes</description>
                <product>
                    <property>aero/qbar-psf</property>
                    <property>metrics/Sw-sqft</property>
                    <property>fcs/speedbrake-pos-norm</property>
                    <value>0.02</value>
                </product>
            </function>
            <function name="aero/coefficient/CDbeta">
                <description>Drag_due_to_sideslip</description>
                <product>
                    <property>aero/qbar-psf</property>
                    <property>metrics/Sw-sqft</property>
                    <table>
                        <independentVar>aero/beta-rad</independentVar>
                        <tableData>
                          -1.57         1.23
                          -0.26         0.05
                          0             0
                          0.26          0.05
                          1.57          1.23
                        </tableData>
                    </table>
                </product>
            </function>
            <function name="aero/coefficient/CDde">
                <description>Drag_due_to_Elevator_Deflection</description>
                <product>
                    <property>aero/qbar-psf</property>
                    <property>metrics/Sw-sqft</property>
                    <abs>
                        <property>fcs/elevator-pos-norm</property>
                    </abs>
                    <value>0.04</value>
                </product>
            </function>
        </axis>
        <axis name="SIDE" unit="LBS">
            <function name="aero/coefficient/CYb">
                <description>Side_force_due_to_beta</description>
                <product>
                    <property>aero/qbar-psf</property>
                    <property>metrics/Sw-sqft</property>
                    <property>aero/beta-rad</property>
                    <value>-1</value>
                </product>
            </function>
        </axis>
        <axis name="ROLL" unit="LBS*FT">
            <function name="aero/coefficient/Clb">
                <description>Roll_moment_due_to_beta</description>
                <product>
                    <property>aero/qbar-psf</property>
                    <property>metrics/Sw-sqft</property>
                    <property>metrics/bw-ft</property>
                    <property>aero/beta-rad</property>
                    <value>-0.1</value>
                </product>
            </function>
            <function name="aero/coefficient/Clp">
                <description>Roll_moment_due_to_roll_rate</description>
                <product>
                    <property>aero/qbar-psf</property>
                    <property>metrics/Sw-sqft</property>
                    <property>metrics/bw-ft</property>
                    <property>aero/bi2vel</property>
                    <property>velocities/p-aero-rad_sec</property>
                    <value>-0.4</value>
                </product>
            </function>
            <function name="aero/coefficient/Clr">
                <description>Roll_moment_due_to_yaw_rate</description>
                <product>
                    <property>aero/qbar-psf</property>
                    <property>metrics/Sw-sqft</property>
                    <property>metrics/bw-ft</property>
                    <property>aero/bi2vel</property>
                    <property>velocities/r-aero-rad_sec</property>
                    <value>0.15</value>
                </product>
            </function>
            <function name="aero/coefficient/Clda">
                <description>Roll_moment_due_to_aileron</description>
                <product>
                    <property>aero/qbar-psf</property>
                    <property>metrics/Sw-sqft</property>
                    <property>metrics/bw-ft</property>
                    <property>fcs/left-aileron-pos-rad</property>
                    <table>
                        <independentVar>velocities/mach</independentVar>
                        <tableData>
                          0             0.1
                          2             0.033
                        </tableData>
                    </table>
                </product>
            </function>
            <function name="aero/coefficient/Cldr">
                <description>Roll_moment_due_to_rudder</description>
                <product>
                    <property>aero/qbar-psf</property>
                    <property>metrics/Sw-sqft</property>
                    <property>metrics/bw-ft</property>
                    <property>fcs/rudder-pos-rad</property>
                    <value>0.01</value>
                </product>
            </function>
        </axis>
        <axis name="PITCH" unit="LBS*FT">
            <function name="aero/coefficient/Cmalpha">
                <description>Pitch_moment_due_to_alpha</description>
                <product>
                    <property>aero/qbar-psf</property>
                    <property>metrics/Sw-sqft</property>
                    <property>metrics/cbarw-ft</property>
                    <property>aero/alpha-rad</property>
                    <value>-0.6</value>
                </product>
            </function>
            <function name="aero/coefficient/Cmde">
                <description>Pitch_moment_due_to_elevator</description>
                <product>
                    <property>aero/qbar-psf</property>
                    <property>metrics/Sw-sqft</property>
                    <property>metrics/cbarw-ft</property>
                    <property>fcs/elevator-pos-rad</property>
                    <table>
                        <independentVar>velocities/mach</independentVar>
                        <tableData>
                          0             -1.2
                          2             -0.3
                        </tableData>
                    </table>
                </product>
            </function>
            <function name="aero/coefficient/Cmq">
                <description>Pitch_moment_due_to_pitch_rate</description>
                <product>
                    <property>aero/qbar-psf</property>
                    <property>metrics/Sw-sqft</property>
                    <property>metrics/cbarw-ft</property>
                    <property>aero/ci2vel</property>
                    <property>velocities/q-aero-rad_sec</property>
                    <value>-17</value>
                </product>
            </function>
            <function name="aero/coefficient/Cmadot">
                <description>Pitch_moment_due_to_alpha_rate</description>
                <product>
                    <property>aero/qbar-psf</property>
                    <property>metrics/Sw-sqft</property>
                    <property>metrics/cbarw-ft</property>
                    <property>aero/ci2vel</property>
                    <property>aero/alphadot-rad_sec</property>
                    <value>-6</value>
                </product>
            </function>
        </axis>
        <axis name="YAW" unit="LBS*FT">
            <function name="aero/coefficient/Cnb">
                <description>Yaw_moment_due_to_beta</description>
                <product>
                    <property>aero/qbar-psf</property>
                    <property>metrics/Sw-sqft</property>
                    <property>metrics/bw-ft</property>
                    <property>aero/beta-rad</property>
                    <value>0.12</value>
                </product>
            </function>
            <function name="aero/coefficient/Cnr">
                <description>Yaw_moment_due_to_yaw_rate</description>
                <product>
                    <property>aero/qbar-psf</property>
                    <property>metrics/Sw-sqft</property>
                    <property>metrics/bw-ft</property>
                    <property>aero/bi2vel</property>
                    <property>velocities/r-aero-rad_sec</property>
                    <value>-0.15</value>
                </product>
            </function>
            <function name="aero/coefficient/Cndr">
                <description>Yaw_moment_due_to_rudder</description>
                <product>
                    <property>aero/qbar-psf</property>
                    <property>metrics/Sw-sqft</property>
                    <property>metrics/bw-ft</property>
                    <property>fcs/rudder-pos-rad</property>
                    <value>-0.1</value>
                </product>
            </function>
            <function name="aero/coefficient/Cnda">
                <description>Adverse_yaw</description>
                <product>
                    <property>aero/qbar-psf</property>
                    <property>metrics/Sw-sqft</property>
                    <property>metrics/bw-ft</property>
                    <property>fcs/left-aileron-pos-rad</property>
                    <value>0</value>
                </product>
            </function>
        </axis>
    </aerodynamics>

    <output name="757-200_JSBout.csv" type="CSV" rate="100">
        <simulation> OFF </simulation>
        <atmosphere> OFF </atmosphere>
        <massprops> OFF </massprops>
        <aerosurfaces> OFF </aerosurfaces>
        <rates> OFF </rates>
        <velocities> OFF </velocities>
        <forces> OFF </forces>
        <moments> OFF </moments>
        <position> OFF </position>
        <coefficients> OFF </coefficients>
        <ground_reactions> OFF </ground_reactions>
        <fcs> OFF </fcs>
        <propulsion> OFF </propulsion>
    </output>

<external_reactions>

 <force name="pushback" frame="BODY">
  <location unit="M">
		<x> -19.423558000 </x>
		<y> 0.000000000 </y>
		<z> 0.000210075 </z>
  </location>
  <direction>
   <x>1</x>
   <y>0</y>
   <z>0</z>
  </direction>
 </force>

</external_reactions>

</fdm_config>
